units metal
boundary p p p
dimension 3

atom_style full

variable step_calc equal 10000
variable step_calc_2 equal 50000
variable dump_dt equal 1

variable dump_write string dummp.lammpstrj

read_data au_twist_dupl.data
mass 1 196.96657

neighbor 2.0 bin
neigh_modify every 1 delay 0 check yes


pair_style soft 1.5
pair_coeff 1 1 10.0

min_style cg
min_modify dmax 0.05 norm inf
minimize 1.0e-4 1.0e-4 500 5000


pair_style soft 1.5
pair_coeff 1 1 50.0

min_style cg
min_modify dmax 0.05 norm inf
minimize 1.0e-4 1.0e-4 500 5000

pair_style soft 1.5
pair_coeff 1 1 150.0

min_style cg
min_modify dmax 0.05 norm inf
minimize 1.0e-4 1.0e-4 500 5000


pair_style lj/cut 10.0
pair_coeff 1 1 0.229 2.63


dump dummp all atom 1 ${dump_write}
dump_modify dummp sort id

group ext type 1

minimize 1.0e-6 1.0e-6 1000 10000

dump_modify dummp every 100


velocity ext create 300.0 312

fix T ext nvt temp 300.0 1000.0 0.05
thermo_style custom step temp press etotal vol lx ly lz
thermo 100
timestep 0.0005

run ${step_calc}


velocity ext create 1000.0 1023

unfix T
fix T ext nvt temp 1000.0 1000.0 0.1
thermo_style custom step temp press etotal vol lx ly lz
thermo 100
timestep 0.001

run ${step_calc_2}

velocity ext create 1000.0 1203

unfix T
fix T ext npt temp 1000.0 1000.0 0.05 iso 1 1 0.5
thermo_style custom step temp press etotal vol lx ly lz
thermo 100
timestep 0.0005

run ${step_calc}


velocity ext create 1000.0 1302

unfix T
fix T ext npt temp 1000.0 1000.0 0.05 iso 1 1 0.5
thermo_style custom step temp press etotal vol lx ly lz
thermo 100
timestep 0.001

run ${step_calc_2}

velocity ext create 1000.0 1230

unfix T
fix T ext npt temp 1000.0 0.1 0.05 iso 1 1 0.5
thermo_style custom step temp press etotal vol lx ly lz
thermo 100
timestep 0.0005

run ${step_calc_2}

dump_modify dummp every 1
minimize 1.0e-6 1.0e-6 1000 10000
